// SBML level 3 version 1

model main()
  // model units - substance: mole, time: second, extent: mole

  // Compartments:
  compartment c1 = 1 litre;

  // Species:
  species C in c1 = 0;
  species CycB in c1 = 0;
  species Mstar in c1 = 0;
  species M in c1;
  species MC in c1 = 0;
  species A in c1;
  species AC in c1 = 0;
  species ACMC in c1 = 0;
  species $Ctot in c1;
  species $flux_ratio_cycb in c1;
  species $flux_ratio_c20 in c1;

  // Parameters:
  ksyn_c20 = 1;
  ksyn_cy = 1;
  kdegbg = 1;
  kinact = 1;
  J = 1;
  kact = 1;
  k_nuk = 1;
  nuk = 1;
  J1 = 1;
  kassmc = 1;
  kdissmc = 1;
  kassac = 1;
  kassacmc = 1;
  kdissac = 1;
  kdissacmc = 1;
  kdeg = 1;
  kdeg_cy = 1;
  kdegbg_cy = 1;
  Atot = 1;
  Mtot = 1;

  // Assignment rules:
  A := Atot - AC - ACMC;
  M := Mtot - Mstar - MC - ACMC;
  Ctot := AC + MC + 2*ACMC + C;
  flux_ratio_cycb := kdeg_cy*CycB*AC/(kdegbg_cy*CycB + 1e-100);
  flux_ratio_c20 := kdeg*ACMC/(kdegbg*Ctot + 1e-100);

  // Reactions:
  R1_Cdc20_synthesis: => C; ksyn_c20;
  R2_CycB_synthesis: => CycB; ksyn_cy;
  R3_Cdc20_degradation: C => ; kdegbg*C;
  R4_M_inactivation: Mstar => M; kinact*Mstar/(J + Mstar);
  R5_M_activation: M => Mstar; kact*CycB*M*k_nuk*nuk/((J1 + nuk)*(J + M));
  R6_MC_formation: Mstar + C => MC; kassmc*Mstar*C;
  R7_MC_dissassociation: MC => Mstar + C; kdissmc*MC;
  R8_AC_formation: A + C => AC; kassac*A*C;
  R9_ACMC_formation: AC + MC => ACMC; kassacmc*MC*AC;
  R10_AC_dissassociation: AC => A + C; kdissac*AC;
  R11_ACMC_dissassociation: ACMC => AC + MC; kdissacmc*ACMC;
  R12_ACMC_deg: ACMC => A + M + C; kdeg*ACMC;
  R13_CycB_degradation: CycB + AC => AC; kdeg_cy*CycB*AC;
  R14_MC_bgdegradation: MC => M; kdegbg*MC;
  R15_AC_bgdegradation: AC => A; kdegbg*AC;
  R16_ACMC_bgdegradation: ACMC => A + M; kdegbg*ACMC;
  R17_Cycb_bgdegradation: CycB => ; kdegbg_cy*CycB;

  // Unit definitions:
  unit per_second = 1 / second;
end
